Q(a, b) := integral(x*exp((-x^2 - a^2)/2)*In(0, a*x), x = b .. ∞)  # Функция Маркума
fp(x, ν, σ) := x/σ^2*exp(-(x^2 + ν^2)/(2*σ^2))*In(0, x*ν/σ^2)  # Функция плотности
fr(x, ν, σ) := 1 - Q(ν/σ, x/σ)  # Функция распределения
L(x) := e^(x/2)*((1 - x)*In(0, -x/2) - x*In(1, -x/2))  # Полином Лаггера
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x := 0, 0.01 .. 10
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Моменты
ν := 0, 2 .. 4
σ := 1
α2(ν, σ) := integral(x^2*fp(x, ν, σ), x = 0 .. 100)
α3(ν, σ) := integral(x^3*fp(x, ν, σ), x = 0 .. 100)
α1(ν, σ) := integral(x*fp(x, ν, σ), x = 0 .. 100)
α1(ν, σ) = [1.25331; 2.27238; 4.12719]
α2(ν, σ) = [2; 6; 18]
α3(ν, σ) = [3.75994; 17.5953; 82.2844]
# Мат Ожидание
M1(ν, σ) := α1(ν, σ)
M2(ν, σ) := σ*sqrt(π/2)*L(-ν^2/(2*σ^2))
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